// COMSOL Multiphysics 6.0.0.318 model "tension(3.1).mph"
// Outline of the model tree

Parameters
  ell = 0.01[mm]
  k = 1e-9
  Gc = 270[N/m]
  E = 210[GPa]
  mu = 0.3
  G = E/(2*(1+mu))
  lambda = E*mu/((1+mu)*(1-2*mu))

Variables
  var1 "Variables 1"
    e11 = u1x  // elatic strains
    e33 = u3z
    e31 = (u1z+u3x)/2
    e13 = e31
    e11p = 0.5*(e11+e33)+sqrt(((e11-e33)/2)^2+(e13/2)^2)
    e33p = 0.5*(e11+e33)-sqrt(((e11-e33)/2)^2+(e13/2)^2)
    Sigma11 = (lambda*(e11+e33)+2*G*e11)*gg  // stresses
    Sigma33 = (lambda*(e11+e33)+2*G*e33)*gg
    Sigma13 = 2*(G*e31)*gg
    Sigma31 = Sigma13
    phi_p = 0.5*lambda*trp^2+G*(e11pp*e11pp+e33pp*e33pp)  // Postive energy
    H = max(phi_p,History)
    gg = (1-d)^2+k
    FF = intop1(Sigma13)
    trp = if(e11+e33>0,e11+e33,0)
    e11pp = if(e11p>0,e11p,0)
    e33pp = if(e33p>0,e33p,0)

Couplings
  intop1: Integration on boundaries 6

Common definitions
  state1: StateVariables on domains 1-3 | state = History; initialValue = 0; updateExpression = max(History,phi_p)

Geometry
  geom1 "Geometry 1" (2D, length unit mm)
    sq1: Square
    r1: Rectangle | pos = {0, 0.5-0.001/2}; size = {0.5, 0.001}
    dif1: Difference | input = sq1; input2 = r1
    r2: Rectangle | pos = {0.5, 0.45}; size = {0.5, 0.1}
    fin: Finalize "Form Union"

Physics
  w: WeakFormPDE on all domains
    dependent variable u = {u1, u3}
    Units.DependentVariableQuantity = none
    Units.CustomDependentVariableUnit = m
    wfeq1: WeakFormPDE (default) | weak = {-test(u1x)*Sigma11-test(u1z)*Sigma13, -test(u3x)*Sigma31-test(u3z)*Sigma33}
    zflx1: ZeroFluxBoundary "Zero Flux 1" (default)
    init1: init "Initial Values 1" (default)
    dir1: DirichletBoundary "Dirichlet Boundary Condition 1" on boundaries 2 | r = {0, 0}
    dir2: DirichletBoundary "Dirichlet Boundary Condition 2" on boundaries 6 | r = {0, 5e-10[m/s]*t}
  w2: WeakFormPDE on all domains
    dependent variable d
    Units.DependentVariableQuantity = none
    Units.CustomDependentVariableUnit = 1
    wfeq1: WeakFormPDE (default) | weak = -2*(1-d)*H*test(d)+Gc/ell*(d*test(d)+ell^2*(dx*test(dx)+dz*test(dz)))
    zflx1: ZeroFluxBoundary "Zero Flux 1" (default)
    init1: init "Initial Values 1" (default)

Mesh
  mesh1 "Mesh 1"
    size: MeshSizeDefault | hmax = 0.067; hmin = 3.0E-4; hcurve = 0.3; hgrad = 1.3
    map1: Map "Mapped 1" on domains 3
      size1: Size on domains 3 | hmax = 0.005; custom = on
    ftri1: FreeTri "Free Triangular 1" on domains 1, 2
      size1: Size on domains 1, 2 | hauto = 3

Studies
  std1 "Study 1"
    time: Transient "Time Dependent" | tlist = range(0,10,15000); usertol = on; rtol = 0.0001

Solver configurations
  sol1 "Solution 1" (study std1)
    v1: Variables "Dependent Variables 1"
    t1: Time "Time-Dependent Solver 1"
      tlist = range(0,10,15000)
      atolmethod = {comp1_u1, global, comp1_u3, global, comp1_state1, global, comp1_d, scaled}
      maxstepconstraintbdf = expr
      maxstepexpressionbdf = 010
      eventtol = 0.0001
      estrat = exclude
      tstepsrk34 = manual
      dDef: Direct
      se1: Segregated | segterm = itertol; segiter = 1000; maxsegiter = 300; segtermonres = auto; segreserrfact = 10
        ssDef: SegregatedStep "u"
          segvar = {comp1_u1, comp1_u3}
          subdtech = auto
          subiter = 100
          subtermauto = itertol
          subtermonres = auto
          subreserrfact = 10
          subntolfact = 1
        ss1: SegregatedStep "d"
          subdtech = auto
          subiter = 100
          subtermauto = itertol
          subtermonres = auto
          subreserrfact = 10
          maxsubiter = 100
          subntolfact = 1
        ss2: SegregatedStep "H"
          segvar = {comp1_state1}
          subdtech = auto
          subiter = 100
          subtermauto = itertol
          subtermonres = auto
          subreserrfact = 10
          maxsubiter = 100
          subntolfact = 1
        ll1: LowerLimit | lowerlimit = comp1.d 0

Datasets
  dset1: Solution | solution = sol1

Plots
  pg1: PlotGroup2D "2D Plot Group 1" | data = dset1
    surf1: Surface | expr = d
  pg2: PlotGroup2D "2D Plot Group 2" | data = dset1
    surf1: Surface | expr = d